N := 1024
fs := 319 kHz
df := fs/N = 311.523 Hz
f0 := 3.135 MHz
fdop := 50 kHz
ff := (f0 - fdop)/df = 9902.95
fsk1 := 9896*df - f0 = -52164.1 Hz
fsk2 := fsk1 - fs/1024 = -52475.6 Hz
fsk3 := fsk1 - fs/2048 = -52319.8 Hz
fsk4 := fsk1 - fs/4096 = -52241.9 Hz
fsk4 := fsk1 - fs/8192 = -52203 Hz
